// SBML level 2 version 4

model untitled()

  // Compartments:
  compartment default = 1 volume;

  // Species:
  species AKT in default = 0.2/default;
  species pIRS1 in default = 1.2955/default;
  species NO in default = 0.013/default;
  substanceOnly species ANGII in default = 0.13;
  substanceOnly species ROS in default = 1.1504;
  substanceOnly species ONOO in default = 0.1496;
  species sa3_degraded in default = 0;
  species sa4_degraded in default = 0;
  species sa5_degraded in default = 0;
  species sa6_degraded in default = 0;

  // Parameters:
  K1 = 0.05 substance;
  K2 = 0.05 substance;
  d1 = 1 substance;
  d2 = 1 substance;
  k1 = 10 substance;
  k2 = 10 substance;
  k3 = 0.1 substance;
  k4 = 0.01 substance;
  k5 = 0.1 substance;
  k6 = 10 substance;
  k7 = 0.1 substance;
  k8 = 0.1 substance;
  delta = 1 substance;
  beta = 1 substance;
  deltaon = 0.01 substance;
  deltano = 0.01 substance;
  deltaang = 1 substance;
  deltar = 0.01 substance;
  lambda = 0.5 substance;
  phi = 1 substance;
  eta = 0.01 substance;
  psi = 0.559 substance;
  E2T = 1 substance;

  // Reactions:
  activation_of_AKT_by_pIRS1: pIRS1 => AKT; -((d1 + K1)/K2*beta*AKT*pIRS1) + (d1 + K1)*beta*pIRS1*AKT^2/(K2^2 + K2*AKT) + d1*beta*pIRS1*AKT/(AKT + K2) + K2*E2T*(1 - AKT)/(1 - AKT + K2);
  activation_of_AKT_by_ONOO: ONOO => AKT; k3*ONOO;
  re5: AKT + ANGII => pIRS1; delta/beta*K2/K1*E2T*lambda + (phi - eta*(1 + k7*ANGII)*psi)*(1 - AKT) - delta*(d1 + K1)*pIRS1; re5 is "activation of pIRS1 by AKT and ANGII";
  activation_of_NO_by_AKT: AKT => NO; k4*(1 - AKT);
  re7: NO + ROS -> ONOO; k8*NO*ROS; re7 is "production of ONOO from NO and ROS";
  degradation_of_NO: NO => sa3_degraded; deltano*NO;
  activation_of_ANG_II_from_NO: NO => ANGII; k6*NO;
  degradation_of_ANGII: ANGII => sa4_degraded; deltaang*ANGII;
  activation_of_ROS_from_ANGII: ANGII => ROS; k5*ANGII;
  degradation_of_ROS: ROS => sa5_degraded; deltar*ROS;
  degradation_of_ONOO: ONOO => sa6_degraded; deltaon*ONOO;

  // Unit definitions:
  unit substance = mole;
  unit volume = litre;
  unit area = metre^2;
  unit length = metre;
  unit time = second;
end
